// COMSOL Multiphysics 5.6.0.401 model "Tri_3_re.mph"
// Outline of the model tree

Parameters
  T = 0.01
  R = 1
  E0 = 1
  E1 = 1
  rho = 1

Geometry
  geom1 "Geometry 1" (2D, length unit m)
    c1: Circle | r = R; angle = 120
    c2: Circle | rot = 1; r = R; angle = 118
    fin: Finalize "Form Union"

Physics
  solid: SolidMechanics on all domains
    dependent variable u = {u, v, w}
    Type2D.Type2D = PlaneStrain
    d.d = 0.1
    lemm1: LinearElasticModel "Linear Elastic Material 1" (default)
      E_mat = userdef
      E = E1
      nu_mat = userdef
      nu = 0.3
      rho_mat = userdef
      rho = 0
      exs1: ExternalStress (disabled) on all domains | Sext = rho
    free1: Free (default)
    init1: init "Initial Values 1" (default)
    roll1: Roller on boundaries 1, 4-8
    lemm2: LinearElasticModel "Linear Elastic Material 2" on domains 1, 3
      E_mat = userdef
      E = E0
      nu_mat = userdef
      nu = 0.3
      rho_mat = userdef
      rho = 0
      exs1: ExternalStress on all domains
        sext = rho
        StressInputType = StressTensorMaterial
        ContributionType = Load
        Sext = rho
    fix1: Fixed "Fixed Constraint 1" (disabled) on no boundaries

Mesh
  mesh1 "Mesh 1"
    size: MeshSizeDefault | hmax = 0.015; hmin = 3.0E-5; hcurve = 0.2; hauto = 1
    ftri2: FreeTri "Free Triangular 2" on domains 1, 3
      size1: Size on no domains | hmax = 0.001; hauto = 1; custom = on
    ftri3: FreeTri "Free Triangular 3" on remaining entities
      size1: Size on entire geometry | hauto = 2

Studies
  std1 "Study 1"
    param: Parametric "Parametric Sweep"
      sweeptype = filled
      pname = {rho, E0}
      plistarr = {0.001, "0.005, 0.01, 0.05, 0.1, 10, 100"}
      punit = {, }
    stat: Stationary

Solver configurations
  sol1 "Solution 1" (study std1)
    v1: Variables "Dependent Variables 1"
    s1: Stationary "Stationary Solver 1"
      dDef: Direct
      fc1: FullyCoupled | linsolver = dDef
  sol2 "Parametric Solutions 1" (study std1)

Datasets
  dset1: Solution | solution = sol1
  dset2: Solution | solution = sol2

Plots
  pg3: PlotGroup2D "Stress (solid) 1" | data = dset2
    surf1: Surface | expr = solid.sy
      def: Deform "Deformation" | expr = {u, v}; descr = Displacement field
  pg4: PlotGroup2D "Stress (solid)" | data = dset2
    surf1: Surface | expr = solid.mises
      def: Deform "Deformation" | expr = {u, v}; descr = Displacement field
  pg5: PlotGroup1D "1D Plot Group 5" | data = dset2
    lngr1: LineGraph on boundaries 4 | expr = log(solid.sy); xdata = expr; xdataexpr = log(x + eps)